*Heading
** Job name: 3PB_CS_Concrete_Beam_with_Damage Model name: Concrete_Frame_3PB_CS_with_Damage
** Generated by: Abaqus/CAE 2023
*Preprint, echo=NO, model=NO, history=NO, contact=NO
**
** PARTS
**
*Part, name=Cylinder_Support
*Node
      1,          25.,           0.,         150.
      2,          25.,           0.,           0.
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*Element, type=R3D4
  1,   1,   3,  33,  48
  2,   3,   4,  34,  33
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*Element, type=R3D3
241, 268, 260, 261
242, 270, 271, 258
243, 276,  10,   9
244, 279,   6,   5
275, 293, 285, 286
276, 295, 296, 283
277, 301,  25,  24
278, 304,  21,  20
*Node
    307,           0., -1.53080845e-15,         150.
*Nset, nset=Cylinder_Support-RefPt_, internal
307,
*Elset, elset=Cylinder_Support, generate
   1,  308,    1
*End Part
**
*Part, name=Frame
*Node
      1,         200.,          75.,         150.
      2,         200.,          75.,           0.
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*Element, type=C3D8R
   1,  184, 1713, 6249, 1237,    1,   33,  761,   94
   2, 1713, 1714, 6250, 6249,   33,   34,  762,  761
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*Nset, nset=Beam_3D, generate
     1,  19968,      1
*Elset, elset=Beam_3D, generate
     1,  17325,      1
*Nset, nset=Face_RP_1
    3,    4,   25,   26,   64,   65
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*Elset, elset=Face_RP_1, generate
 13201,  13275,      1
*Nset, nset=Face_RP_3
   21,   22,   23,   24,  409,  410
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*Elset, elset=Face_RP_3, generate
 8026,  8100,     1
*Nset, nset=Face_RP_4
    5,    8,   13,   16,   95,   96
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*Elset, elset=Face_RP_4, generate
 14326,  14400,      1
** Section: Concrete_Beam_3D_Section
*Solid Section, elset=Beam_3D, material=Concrete
,
*End Part
**
**
** ASSEMBLY
**
*Assembly, name=Assembly
**
*Instance, name=Beam-1, part=Frame
*End Instance
**
*Instance, name=Cylinder_Support-1, part=Cylinder_Support
          0.,         100.,           0.
*End Instance
**
*Instance, name=Cylinder_Support-2, part=Cylinder_Support
       -225.,        -100.,           0.
*End Instance
**
*Instance, name=Cylinder_Support-3, part=Cylinder_Support
        225.,        -100.,           0.
*End Instance
**
*Nset, nset=RP-1, instance=Cylinder_Support-1
 307,
*Nset, nset=Set-2, instance=Cylinder_Support-2
 307,
*Nset, nset=Set-3, instance=Cylinder_Support-3
 307,
*Rigid Body, ref node=Cylinder_Support-1.Cylinder_Support-RefPt_, elset=Cylinder_Support-1.Cylinder_Support
*Rigid Body, ref node=Cylinder_Support-2.Cylinder_Support-RefPt_, elset=Cylinder_Support-2.Cylinder_Support
*Rigid Body, ref node=Cylinder_Support-3.Cylinder_Support-RefPt_, elset=Cylinder_Support-3.Cylinder_Support
*Elset, elset=__Int-2_gcs0_37_SPOS, internal, instance=Cylinder_Support-1, generate
   1,  240,    1
*Surface, type=ELEMENT, name=_Int-2_gcs0_37, internal
__Int-2_gcs0_37_SPOS, SPOS
*Elset, elset=__Int-2_gcs0_40_SNEG, internal, instance=Cylinder_Support-1, generate
   1,  240,    1
*Surface, type=ELEMENT, name=_Int-2_gcs0_40, internal
__Int-2_gcs0_40_SNEG, SNEG
*Elset, elset=__Int-2_gcs0_43_SPOS, internal, instance=Cylinder_Support-2, generate
   1,  240,    1
*Surface, type=ELEMENT, name=_Int-2_gcs0_43, internal
__Int-2_gcs0_43_SPOS, SPOS
*Elset, elset=__Int-2_gcs0_46_SNEG, internal, instance=Cylinder_Support-2, generate
   1,  240,    1
*Surface, type=ELEMENT, name=_Int-2_gcs0_46, internal
__Int-2_gcs0_46_SNEG, SNEG
*Elset, elset=__Int-2_gcs0_49_SPOS, internal, instance=Cylinder_Support-3, generate
   1,  240,    1
*Surface, type=ELEMENT, name=_Int-2_gcs0_49, internal
__Int-2_gcs0_49_SPOS, SPOS
*Elset, elset=__Int-2_gcs0_52_SNEG, internal, instance=Cylinder_Support-3, generate
   1,  240,    1
*Surface, type=ELEMENT, name=_Int-2_gcs0_52, internal
__Int-2_gcs0_52_SNEG, SNEG
*End Assembly
**
** MATERIALS
**
*Material, name=Concrete
*Density
 2.5e-09,
*Elastic
35500., 0.2
*Concrete Damaged Plasticity
35.,   0.1,  1.16,  0.67, 1e-05
*Concrete Compression Hardening
  59.63,           0.
  90.41, -0.000358545
 111.81, -0.000407822
 123.66, -0.000366276
   0.69,   0.00395971
*Concrete Tension Stiffening
 4.17,          0.
 4.94, 5.64865e-05
 2.28, 0.000238378
 0.08, 0.000347838
*Concrete Compression Damage
       0.,           0.
       0., -0.000358545
       0., -0.000407822
       0., -0.000366276
 0.983571,   0.00395971
*Concrete Tension Damage
   0.,          0.
   0., 5.64865e-05
   0., 0.000238378
 0.96, 0.000347838
**
** INTERACTION PROPERTIES
**
*Surface Interaction, name=IntProp-1
1.,
*Friction
0.,
*Surface Behavior, pressure-overclosure=HARD
**
** BOUNDARY CONDITIONS
**
** Name: Support-2 Type: Displacement/Rotation
*Boundary
Set-2, 1, 1
Set-2, 2, 2
Set-2, 3, 3
Set-2, 4, 4
Set-2, 5, 5
Set-2, 6, 6
** Name: Support-3 Type: Displacement/Rotation
*Boundary
Set-3, 1, 1
Set-3, 2, 2
Set-3, 3, 3
Set-3, 4, 4
Set-3, 5, 5
Set-3, 6, 6
**
** INTERACTIONS
**
** Interaction: Int-2
*Contact
*Contact Inclusions, ALL EXTERIOR
*Contact Property Assignment
 ,  , IntProp-1
*Surface Property Assignment, property=GEOMETRIC CORRECTION
_Int-2_gcs0_37, Circumferential, 0., 100., 0.,  0., 100., 1.
_Int-2_gcs0_40, Circumferential, 0., 100., 0.,  0., 100., 1.
_Int-2_gcs0_43, Circumferential, -225., -100., 0.,  -225., -100., 1.
_Int-2_gcs0_46, Circumferential, -225., -100., 0.,  -225., -100., 1.
_Int-2_gcs0_49, Circumferential, 225., -100., 0.,  225., -100., 1.
_Int-2_gcs0_52, Circumferential, 225., -100., 0.,  225., -100., 1.
** ----------------------------------------------------------------
**
** STEP: Loading
**
*Step, name=Loading, nlgeom=YES, inc=300
*Static, stabilize, factor=1e-09, allsdtol=0, continue=NO
0.001, 1., 1e-15, 0.01
**
** BOUNDARY CONDITIONS
**
** Name: Support-1 Type: Displacement/Rotation
*Boundary
RP-1, 1, 1
RP-1, 2, 2, -5.
RP-1, 3, 3
RP-1, 4, 4
RP-1, 5, 5
RP-1, 6, 6
**
** OUTPUT REQUESTS
**
*Restart, write, frequency=0
**
** FIELD OUTPUT: F-Output-1
**
*Output, field
*Node Output
RF, U
*Element Output, directions=YES
DAMAGEC, DAMAGET, LE, PE, PEEQ, PEMAG, S, STATUS
*Contact Output
CDISP, CSTRESS
**
** HISTORY OUTPUT: H-Output-1
**
*Output, history, variable=PRESELECT
*End Step
