*Heading
** Job name: 3PB_Concrete_Beam_with_Damage-w5 Model name: Concrete_Frame_3PB_with_Damage-w5
** Generated by: Abaqus/CAE 2023
*Preprint, echo=NO, model=NO, history=NO, contact=NO
**
** PARTS
**
*Part, name=Frame
*Node
      1,         200.,          75.,         150.
      2,         200.,          75.,           0.
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*Element, type=C3D8R
   1,  184, 1713, 6249, 1237,    1,   33,  761,   94
   2, 1713, 1714, 6250, 6249,   33,   34,  762,  761
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*Nset, nset=Beam_3D, generate
     1,  19968,      1
*Elset, elset=Beam_3D, generate
     1,  17325,      1
*Nset, nset=Face_RP_1
    3,    4,   25,   26,   64,   65
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*Elset, elset=Face_RP_1, generate
 13201,  13275,      1
*Nset, nset=Face_RP_3
   21,   22,   23,   24,  409,  410
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*Elset, elset=Face_RP_3, generate
 8026,  8100,     1
*Nset, nset=Face_RP_4
    5,    8,   13,   16,   95,   96
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*Elset, elset=Face_RP_4, generate
 14326,  14400,      1
** Section: Concrete_Beam_3D_Section
*Solid Section, elset=Beam_3D, material=Concrete
,
*End Part
**
**
** ASSEMBLY
**
*Assembly, name=Assembly
**
*Instance, name=Beam-1, part=Frame
*End Instance
**
*Node
      1,           0.,          75.,          75.
*Nset, nset=RP-1
 1,
*Surface, type=NODE, name=Beam-1_Face_RP_1_CNS_, internal
Beam-1.Face_RP_1, 1.
** Constraint: RP-1_to_Face
*Coupling, constraint name=RP-1_to_Face, ref node=RP-1, surface=Beam-1_Face_RP_1_CNS_
*Distributing, weighting method=UNIFORM, coupling=STRUCTURAL
*End Assembly
**
** MATERIALS
**
*Material, name=Concrete
*Density
 2.5e-09,
*Elastic
35500., 0.2
*Concrete Damaged Plasticity
35.,   0.1,  1.16,  0.67, 1e-05
*Concrete Compression Hardening
  59.63,           0.
  90.41, -0.000358545
 111.81, -0.000407822
 123.66, -0.000366276
   0.69,   0.00395971
*Concrete Tension Stiffening
 4.17,          0.
 4.94, 5.64865e-05
 2.28, 0.000238378
 0.08, 0.000347838
*Concrete Compression Damage
       0.,           0.
       0., -0.000358545
       0., -0.000407822
       0., -0.000366276
 0.983571,   0.00395971
*Concrete Tension Damage
   0.,          0.
   0., 5.64865e-05
   0., 0.000238378
 0.96, 0.000347838
**
** BOUNDARY CONDITIONS
**
** Name: Support_1 Type: Displacement/Rotation
*Boundary
Beam-1.Face_RP_3, 1, 1
Beam-1.Face_RP_3, 2, 2
Beam-1.Face_RP_3, 3, 3
Beam-1.Face_RP_3, 4, 4
Beam-1.Face_RP_3, 5, 5
Beam-1.Face_RP_3, 6, 6
** Name: Support_2 Type: Displacement/Rotation
*Boundary
Beam-1.Face_RP_4, 1, 1
Beam-1.Face_RP_4, 2, 2
Beam-1.Face_RP_4, 3, 3
Beam-1.Face_RP_4, 4, 4
Beam-1.Face_RP_4, 5, 5
Beam-1.Face_RP_4, 6, 6
** ----------------------------------------------------------------
**
** STEP: Loading
**
*Step, name=Loading, nlgeom=YES, inc=300
*Static, stabilize, factor=1e-09, allsdtol=0, continue=NO
0.001, 1., 1e-15, 0.01
**
** BOUNDARY CONDITIONS
**
** Name: Loading Type: Displacement/Rotation
*Boundary
RP-1, 1, 1
RP-1, 2, 2, -5.
RP-1, 3, 3
RP-1, 4, 4
RP-1, 5, 5
RP-1, 6, 6
**
** OUTPUT REQUESTS
**
*Restart, write, frequency=0
**
** FIELD OUTPUT: F-Output-1
**
*Output, field
*Node Output
RF, U
*Element Output, directions=YES
DAMAGEC, DAMAGET, LE, PE, PEEQ, PEMAG, S, STATUS
*Contact Output
CDISP, CSTRESS
**
** HISTORY OUTPUT: H-Output-1
**
*Output, history, variable=PRESELECT
*End Step
